units metal
boundary p p p
atom_style atomic


read_data ${input_filename}

pair_style  usc
pair_coeff  * * ${potential_filename} H O Si

pair_modify coord 2 3 2.0 0.3
pair_modify coord 2 1 1.4 0.3
mass            1 1.00794
mass            2 15.9994
mass            3 28.08


# Print the number of atoms in the group
# group H type 1
# variable countGroup1 equal count(H)
# variable silanol_concentration equal ${countGroup1}/((lx*ly)/100)
# print "Number of atoms in H: ${countGroup1}"
# print "Silanol concentration: ${silanol_concentration}"


## Delete random hydrogen to attain a specific silanol concentration
group H type 1
variable countGroup1 equal count(H)
variable frac equal 1-${silanol}/${countGroup1}
delete_atoms random count 10 yes H NULL 123

# variable silanol_concentration equal ${countGroup1}/((lx*ly)/100)
# print "Fraction used : ${frac}"
# print "Number of atoms in H: ${countGroup1}"
# print "Silanol concentration: ${silanol_concentration}"

# group O type 2
# compute coordO O coord/atom cutoff 2 1*3
# compute         31 O reduce sum c_coordO
# thermo_style    custom step temp pe c_31
# run             0
# variable aloneO atom "c_coordO==1"
# group  lonerO variable aloneO
# group lonerO intersect O lonerO
# delete_atoms group lonerO

write_data ${output_filename}
